a := 40 mm
θ_a := 89.76 deg
b := 50 mm
c := 25 mm
θ_d := 43.9 deg
d := 80 mm
e := 78 mm
θ_h := atan(6.5/12) + 90 deg = 118.443 deg
f := 20 mm
g := 70 mm
z := 46 mm
h := sqrt((6.5 mm)^2 + (12 mm)^2) = 13.6473 mm
q := sqrt(a^2 + z^2 - 2*a*z*cos(θ_a)) = 60.8324 mm
θ_Q := acos((a^2 + q^2 - z^2)/(2*a*q)) = 49.1276 deg
θ_Q' := acos((q^2 + b^2 - c^2)/(2*q*b)) = 23.5735 deg
θ_b := θ_Q + θ_Q' = 72.7011 deg
θ_q' := acos((q^2 + c^2 - b^2)/(2*q*c)) = 53.1157 deg
θ_q := acos((z^2 + q^2 - a^2)/(2*q*z)) = 41.1124 deg
θ_c := π - θ_q - θ_q' = 85.7719 deg
θ_k := π/2 - θ_d = 46.1 deg
j := sqrt(c^2 + h^2 - 2*c*h*cos(θ_h)) = 33.7083 mm  # constant
θ_c' := acos((c^2 + j^2 - h^2)/(2*c*j)) = 20.8545 deg
θ_c'' := θ_c - θ_c' = 64.9175 deg
m := sqrt(j^2 + d^2 - 2*j*d*cos(θ_c'' + θ_k)) = 97.3169 mm
θ_f := acos((e^2 + f^2 - m^2)/(2*e*f)) = 163.184 deg
θ_E' := acos((h^2 + j^2 - c^2)/(2*h*j)) = 40.7026 deg
θ_E'' := acos((j^2 + m^2 - d^2)/(2*j*m)) = 50.1179 deg
θ_E''' := acos((e^2 + m^2 - f^2)/(2*e*m)) = 3.40858 deg
θ_e := θ_E' + θ_E'' + θ_E''' = 94.2291 deg
θ_b' := π - θ_a - θ_b = 17.5389 deg
θ_h' := θ_c + θ_h - π = 24.2149 deg
θ_e' := 2*π - θ_c - θ_h - θ_e = 61.556 deg
θ_f' := θ_f - θ_e' = 101.628 deg
x_a := cos(θ_f')*(f + g) = -18.1397 mm
x := a*cos(θ_a) + b*cos(θ_b') + h*cos(θ_h') + e*cos(θ_e') - cos(θ_f')*(f + g) = 115.581 mm
y := d*cos(θ_d) + g*sin(θ_f') = 126.208 mm
x = 115.581 mm
y = 126.208 mm
