a := 40 mm
θ_a := 73 deg
b := 50 mm
c := 25 mm
θ_d := 111 deg
d := 80 mm
e := 78 mm
θ_h := atan(6.5/12) + 90 deg = 118.443 deg
f := 20 mm
g := 70 mm
z := 46 mm
h := sqrt((6.5 mm)^2 + (12 mm)^2) = 13.6473 mm
q := sqrt(a^2 + z^2 - 2*a*z*cos(θ_a)) = 51.3816 mm
θ_Q := acos((a^2 + q^2 - z^2)/(2*a*q)) = 58.8862 deg
θ_Q' := acos((q^2 + b^2 - c^2)/(2*q*b)) = 28.5101 deg
θ_b := θ_Q + θ_Q' = 87.3964 deg
θ_q' := acos((q^2 + c^2 - b^2)/(2*q*c)) = 72.6745 deg
θ_q := acos((z^2 + q^2 - a^2)/(2*q*z)) = 48.1138 deg
θ_c := π - θ_q - θ_q' = 59.2117 deg
θ_k := π - θ_d = 69 deg
j := sqrt(c^2 + h^2 - 2*c*h*cos(θ_h)) = 33.7083 mm  # constant
θ_c' := acos((c^2 + j^2 - h^2)/(2*c*j)) = 20.8545 deg
θ_c'' := θ_c - θ_c' = 38.3573 deg
m := sqrt(j^2 + d^2 - 2*j*d*cos(θ_c'' + θ_k)) = 95.6307 mm
θ_f := acos((e^2 + f^2 - m^2)/(2*e*f)) = 148.535 deg
θ_E' := acos((h^2 + j^2 - c^2)/(2*h*j)) = 40.7026 deg
θ_E'' := acos((j^2 + m^2 - d^2)/(2*j*m)) = 52.983 deg
θ_E''' := acos((e^2 + m^2 - f^2)/(2*e*m)) = 6.26717 deg
θ_e := θ_E' + θ_E'' + θ_E''' = 99.9528 deg
θ_b' := π - θ_a - θ_b = 19.6036 deg
θ_h' := θ_c + θ_h - π = -2.34534 deg
θ_e' := 2*π - θ_c - θ_h - θ_e = 82.3925 deg
θ_f' := θ_f - θ_e' = 66.1426 deg
x_a := cos(θ_f')*(f + g) = 36.4015 mm
x := a*cos(θ_a) + b*cos(θ_b') + h*cos(θ_h') + e*cos(θ_e') - cos(θ_f')*(f + g) = 46.3571 mm
y := -1*(d*sin(θ_d) + g*sin(θ_f')) = -138.705 mm
x = 46.3571 mm
y = -138.705 mm
